/TITLE Model: ASMSIMP2
/COM Finite Element Mesh - PTC - ANSYS 12.0 - ASMSIMP2
/PREP7
/NOPR
MP,EX,1,7.308443e+04
MP,ALPX,1,2.304000e-05
MP,NUXY,1,3.300000e-01
MP,DENS,1,2.793554e-09
MP,KXX,1,1.921632e+02
MP,C,1,9.637529e+08
LOCAL,11,0,0.000000,0.000000,0.000000,0.000000,0.000000,0.000000
LOCAL,12,0,0.000000,0.000000,0.000000,0.000000,0.000000,0.000000
LOCAL,13,0,0.000000,0.000000,0.000000,0.000000,0.000000,0.000000
CSYS,11
ET,1,92
N,1,0.000000,0.000000,0.000000
N,2,10.000000,0.000000,0.000000
N,3,10.000000,10.000000,0.000000
N,4,0.000000,10.000000,0.000000
N,5,2.500000,5.000000,0.000000
N,6,7.500000,5.000000,0.000000
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N,2116,1.144468,4.095898,1.316177
CSYS,12
NROTAT,1
NROTAT,2
NROTAT,3
NROTAT,4
NROTAT,5
NROTAT,6
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NROTAT,1224
SHPP,OFF
TYPE,1
MAT,1
EN,73,1389,1390,1391,1392
EN,74,1389,1393,1394,1395
EN,75,1393,1391,1389,1238
EN,76,1389,1238,1390,1396
EN,77,1391,1238,1397,1390
EN,78,1398,1399,1400,1401
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EN,8010,2116,14,30,31
CERIG,35,171,ALL
CERIG,36,172,ALL
CERIG,37,174,ALL
CERIG,38,173,ALL
CERIG,39,175,ALL
CERIG,40,176,ALL
CERIG,41,177,ALL
CERIG,42,178,ALL
CERIG,43,179,ALL
CERIG,44,180,ALL
CERIG,45,181,ALL
CERIG,46,182,ALL
CERIG,47,183,ALL
CERIG,48,184,ALL
CERIG,49,185,ALL
CERIG,50,186,ALL
CERIG,51,187,ALL
CERIG,52,188,ALL
CERIG,53,189,ALL
CERIG,54,190,ALL
CERIG,55,191,ALL
CERIG,56,192,ALL
CERIG,57,193,ALL
CERIG,58,194,ALL
CERIG,59,195,ALL
CERIG,60,196,ALL
CERIG,61,197,ALL
CERIG,62,198,ALL
CERIG,63,199,ALL
CERIG,64,200,ALL
CERIG,65,201,ALL
CERIG,66,202,ALL
CERIG,67,203,ALL
CERIG,68,204,ALL
CERIG,205,1208,UX,UZ,ROTX,ROTY,ROTZ
CERIG,206,1207,UX,UZ,ROTX,ROTY,ROTZ
CERIG,207,560,UX,UZ,ROTX,ROTY,ROTZ
CERIG,208,559,UX,UZ,ROTX,ROTY,ROTZ
CERIG,209,1216,UX,UZ,ROTX,ROTY,ROTZ
CERIG,210,1215,UX,UZ,ROTX,ROTY,ROTZ
CERIG,211,1214,UX,UZ,ROTX,ROTY,ROTZ
CERIG,212,1213,UX,UZ,ROTX,ROTY,ROTZ
CERIG,213,1212,UX,UZ,ROTX,ROTY,ROTZ
CERIG,214,1211,UX,UZ,ROTX,ROTY,ROTZ
CERIG,215,1210,UX,UZ,ROTX,ROTY,ROTZ
CERIG,216,1209,UX,UZ,ROTX,ROTY,ROTZ
CERIG,217,1224,UX,UZ,ROTX,ROTY,ROTZ
CERIG,218,1223,UX,UZ,ROTX,ROTY,ROTZ
CERIG,219,1222,UX,UZ,ROTX,ROTY,ROTZ
CERIG,220,1221,UX,UZ,ROTX,ROTY,ROTZ
CERIG,221,1220,UX,UZ,ROTX,ROTY,ROTZ
CERIG,222,1219,UX,UZ,ROTX,ROTY,ROTZ
CERIG,223,1218,UX,UZ,ROTX,ROTY,ROTZ
CERIG,224,1217,UX,UZ,ROTX,ROTY,ROTZ
CERIG,225,571,UX,UZ,ROTX,ROTY,ROTZ
CERIG,226,570,UX,UZ,ROTX,ROTY,ROTZ
CERIG,227,569,UX,UZ,ROTX,ROTY,ROTZ
CERIG,228,568,UX,UZ,ROTX,ROTY,ROTZ
CERIG,229,567,UX,UZ,ROTX,ROTY,ROTZ
CERIG,230,566,UX,UZ,ROTX,ROTY,ROTZ
CERIG,231,565,UX,UZ,ROTX,ROTY,ROTZ
CERIG,232,564,UX,UZ,ROTX,ROTY,ROTZ
CERIG,233,563,UX,UZ,ROTX,ROTY,ROTZ
CERIG,234,1121,UX,UZ,ROTX,ROTY,ROTZ
CERIG,235,1120,UX,UZ,ROTX,ROTY,ROTZ
CERIG,236,1119,UX,UZ,ROTX,ROTY,ROTZ
CERIG,237,1118,UX,UZ,ROTX,ROTY,ROTZ
CERIG,238,1117,UX,UZ,ROTX,ROTY,ROTZ
CERIG,239,1116,UX,UZ,ROTX,ROTY,ROTZ
CERIG,240,1115,UX,UZ,ROTX,ROTY,ROTZ
CERIG,241,1114,UX,UZ,ROTX,ROTY,ROTZ
CERIG,242,1113,UX,UZ,ROTX,ROTY,ROTZ
SHPP,ON
CHECK
D,1,UX,0
D,1,UY,0
D,1,UZ,0
D,2,UX,0
D,2,UY,0
D,2,UZ,0
D,3,UX,0
D,3,UY,0
D,3,UZ,0
D,4,UX,0
D,4,UY,0
D,4,UZ,0
D,5,UX,0
D,5,UY,0
D,5,UZ,0
D,6,UX,0
D,6,UY,0
D,6,UZ,0
D,7,UX,0
D,7,UY,0
D,7,UZ,0
D,8,UX,0
D,8,UY,0
D,8,UZ,0
D,9,UX,0
D,9,UY,0
D,9,UZ,0
D,10,UX,0
D,10,UY,0
D,10,UZ,0
D,11,UX,0
D,11,UY,0
D,11,UZ,0
D,12,UX,0
D,12,UY,0
D,12,UZ,0
D,13,UX,0
D,13,UY,0
D,13,UZ,0
D,14,UX,0
D,14,UY,0
D,14,UZ,0
D,15,UX,0
D,15,UY,0
D,15,UZ,0
D,16,UX,0
D,16,UY,0
D,16,UZ,0
D,17,UX,0
D,17,UY,0
D,17,UZ,0
D,18,UX,0
D,18,UY,0
D,18,UZ,0
D,19,UX,0
D,19,UY,0
D,19,UZ,0
D,20,UX,0
D,20,UY,0
D,20,UZ,0
D,21,UX,0
D,21,UY,0
D,21,UZ,0
D,22,UX,0
D,22,UY,0
D,22,UZ,0
D,23,UX,0
D,23,UY,0
D,23,UZ,0
D,24,UX,0
D,24,UY,0
D,24,UZ,0
D,25,UX,0
D,25,UY,0
D,25,UZ,0
D,26,UX,0
D,26,UY,0
D,26,UZ,0
D,27,UX,0
D,27,UY,0
D,27,UZ,0
D,28,UX,0
D,28,UY,0
D,28,UZ,0
D,29,UX,0
D,29,UY,0
D,29,UZ,0
D,30,UX,0
D,30,UY,0
D,30,UZ,0
D,31,UX,0
D,31,UY,0
D,31,UZ,0
D,32,UX,0
D,32,UY,0
D,32,UZ,0
D,33,UX,0
D,33,UY,0
D,33,UZ,0
D,34,UX,0
D,34,UY,0
D,34,UZ,0
F,243,FZ,60.457516
F,244,FZ,57.393791
F,245,FZ,57.393791
F,246,FZ,60.457516
F,247,FZ,47.794118
F,248,FZ,44.117647
F,249,FZ,44.117647
F,250,FZ,55.147059
F,251,FZ,45.138889
F,252,FZ,41.666667
F,253,FZ,45.138889
F,254,FZ,59.027778
F,255,FZ,47.794118
F,256,FZ,44.117647
F,257,FZ,44.117647
F,258,FZ,55.147059
F,259,FZ,41.319092
F,260,FZ,41.666667
F,261,FZ,48.958685
F,262,FZ,59.027778
/GOPR
FINISH
